// SBML level 3 version 1

model SBcoyote_model()

  // Compartments:
  compartment _compartment_default_;
  compartment compartment;

  // Species:
  species $External_glucose in compartment = 0;
  species Glucose in compartment = 0;
  species ATP in compartment = 3;
  species fructose_1_6_bisphosphate in compartment = 0;
  species ADP in compartment = 1;
  species glyceraldehyde_3_phosphate in compartment = 0;
  species NADH in compartment = 0.5;
  species NAD in compartment = 0.5;
  species $Glycerol in compartment = 0;
  species glycerate_3_phosphate in compartment = 0;
  species pyruvate in compartment = 0;
  species Acetyladehyde in compartment = 0;
  species $ethanol in compartment = 0;
  species External_acetaldehyde in compartment = 0;
  species $Sink in compartment = 0;

  // Parameters:
  J0_inputFlux = 0.1;
  J1_k1 = 0.1;
  pow = 0.1;
  J1_Ki = 0.1;
  J1_n = 0.1;
  J2_J2_k = 0.1;
  J3_J3_k = 0.1;
  J4_kg = 0.1;
  J4_kp = 0.1;
  J4_ka = 0.1;
  J4_kk = 0.1;
  J5_J5_k = 0.1;
  J6_J6_k = 0.1;
  J7_J7_k = 0.1;
  J8_J8_k1 = 0.1;
  J8_J8_k2 = 0.1;
  J9_J9_k = 0.1;
  J10_J10_k = 0.1;
  E0 = 0.1;
  k0 = 0.1;
  k0r = 0.1;
  E1 = 0.1;
  k1 = 0.1;
  k1r = 0.1;
  E2 = 0.1;
  k2 = 0.1;
  k2r = 0.1;
  E3 = 0.1;
  k3 = 0.1;
  k3r = 0.1;
  E4 = 0.1;
  k4 = 0.1;
  k4r = 0.1;
  E5 = 0.1;
  k5 = 0.1;
  k5r = 0.1;
  E6 = 0.1;
  k6 = 0.1;
  k6r = 0.1;
  E7 = 0.1;
  k7 = 0.1;
  k7r = 0.1;
  E8 = 0.1;
  k8 = 0.1;
  k8r = 0.1;
  E9 = 0.1;
  k9 = 0.1;
  k9r = 0.1;
  E10 = 0.1;
  k10 = 0.1;
  k10r = 0.1;

  // Reactions:
  J0: SpecRef_J0_rct0 $External_glucose -> SpecRef_J0_prd0 Glucose; E0*(k0*External_glucose - k0r*Glucose);
  J1: SpecRef_J1_rct0 Glucose + SpecRef_J1_rct1 ATP -> SpecRef_J1_prd0 fructose_1_6_bisphosphate + SpecRef_J1_prd1 ADP; E1*(k1*Glucose*ATP - k1r*fructose_1_6_bisphosphate*ADP);
  J2: SpecRef_J2_rct0 fructose_1_6_bisphosphate -> SpecRef_J2_prd0 glyceraldehyde_3_phosphate; E2*(k2*fructose_1_6_bisphosphate - k2r*glyceraldehyde_3_phosphate);
  J3: SpecRef_J3_rct0 glyceraldehyde_3_phosphate + SpecRef_J3_rct1 NADH -> SpecRef_J3_prd0 NAD + SpecRef_J3_prd1 $Glycerol; E3*(k3*glyceraldehyde_3_phosphate*NADH - k3r*NAD*Glycerol);
  J4: SpecRef_J4_rct0 glyceraldehyde_3_phosphate + SpecRef_J4_rct1 ADP + SpecRef_J4_rct2 NAD -> SpecRef_J4_prd0 ATP + SpecRef_J4_prd1 glycerate_3_phosphate + SpecRef_J4_prd2 NADH; E4*(k4*glyceraldehyde_3_phosphate*ADP*NAD - k4r*ATP*glycerate_3_phosphate*NADH);
  J5: SpecRef_J5_rct0 glycerate_3_phosphate + SpecRef_J5_rct1 ADP -> SpecRef_J5_prd0 ATP + SpecRef_J5_prd1 pyruvate; E5*(k5*glycerate_3_phosphate*ADP - k5r*ATP*pyruvate);
  J6: SpecRef_J6_rct0 pyruvate -> SpecRef_J6_prd0 Acetyladehyde; E6*(k6*pyruvate - k6r*Acetyladehyde);
  J7: SpecRef_J7_rct0 Acetyladehyde + SpecRef_J7_rct1 NADH -> SpecRef_J7_prd0 NAD + SpecRef_J7_prd1 $ethanol; E7*(k7*Acetyladehyde*NADH - k7r*NAD*ethanol);
  J8: SpecRef_J8_rct0 Acetyladehyde -> SpecRef_J8_prd0 External_acetaldehyde; E8*(k8*Acetyladehyde - k8r*External_acetaldehyde);
  J9: SpecRef_J9_rct0 ATP -> SpecRef_J9_prd0 ADP; E9*(k9*ATP - k9r*ADP);
  J10: SpecRef_J10_rct0 External_acetaldehyde -> SpecRef_J10_prd0 $Sink; E10*(k10*External_acetaldehyde - k10r*Sink);
end
