// SBML level 3 version 1

model COYOTE_model()

  // Compartments:
  compartment _compartment_default_;

  // Species:
  species S2 in _compartment_default_ = 0;
  species S1 in _compartment_default_ = 0;
  species E in _compartment_default_ = 0;
  species ES in _compartment_default_ = 0;

  // Parameters:
  E0 = 0.1;
  k0 = 0.1;
  k0r = 0.1;
  E1 = 0.1;
  k1 = 0.1;
  k1r = 0.1;
  E2 = 0.1;
  k2 = 0.1;
  k2r = 0.1;

  // Reactions:
  r_0: SpecRef_r_0_rct0 ES -> SpecRef_r_0_prd0 S1 + SpecRef_r_0_prd1 E; E0*(k0*ES - k0r*S1*E);
  r_1: SpecRef_r_1_rct0 S2 + SpecRef_r_1_rct1 E -> SpecRef_r_1_prd0 ES; E1*(k1*S2*E - k1r*ES);
  r_2: SpecRef_r_2_rct0 S1 -> SpecRef_r_2_prd0 S2; E2*(k2*S1 - k2r*S2);
end
